$PROBLEM SAMPLE (2-COMPARTMENT MODEL)

$INPUT ID TIME CMT EVID DV AMT

$DATA data.csv

$SUBROUTINE ADVAN13

$MODEL
COMP=(CENTRAL)
COMP=(PERIPHERAL)

$PK
TVCL = THETA(1)
CL = TVCL * EXP(ETA(1))

TVV1 = THETA(2)
V1 = TVV1 * EXP(ETA(2))

TVQ = THETA(3)
Q = TVQ * EXP(ETA(3))

TVV2 = THETA(4)
V2 = TVV2 * EXP(ETA(4))

KE = CL / V1
K12 = Q / V1
K21 = Q / V2

A_0(1) = 0
A_0(2) = 0

$DES
IF (T<=4) THEN
  KE = 0
ENDIF

DADT(1) = - K12 * A(1) + K21 * A(2) - KE * A(1)
DADT(2) = K12 * A(1) - K21 * A(2)

$ERROR
IPRED = A(1) / V1

W = THETA(5)

Y = IPRED * (1 + W * EPS(1))

; nm2mrg_drop

IWRES = (DV - IPRED) / (IPRED * W)

$THETA
(0, 0.1) ; TVCL   [L/day] : Clearance
(0, 1)   ; TVV1   [L]     : Central Volume
(0, 0.1) ; TVQ    [L/day] : Intercompartmental Clearance
(0, 1)   ; TVV2   [L]     : Peripheral Volume
(0, 0.1) ; W      [-]     : Within-Subject Variability

$OMEGA BLOCK(2)
0.1     ; CL
0.1 0.1 ; V1

$OMEGA
0.1 ; Q
0.1 ; V2

$SIGMA
1 FIX ; Proportional residual error

$ESTIMATION

$COVARIANCE
